// SBML level 2 version 4

model qmodel()
  // qmodel

  // Compartments:
  compartment Qm = 1;

  // Species:
  species S in Qm = 100;
  species R in Qm = 0; R is "E";
  species R in Qm = 30; R is "I";
  species R in Qm = 0; R is "A";
  species R in Qm = 0; R is "Q";
  species R in Qm = 0; R is "IQ";
  species R in Qm = 0; R is "AQ";
  species R in Qm = 0;

  // Parameters:
  beta = 0.1;
  birth = 0;
  mu = 0;
  N = 388;
  gamma = 0.196;
  c = 0.85;
  deltaI = 0.076;
  deltaA = 0.1;
  deltaQ = 0.076;
  deltaAQ = 0.1;
  deltaIQ = 0.076;
  tau = 0.05;
  nuI = 0.8;
  nuA = 0.3;
  alpha = 0.4;
  chi = 0.2;
  eta = 0.6;
  lambda = 0.5;
  p = 0.6;

  // Reactions:
  Reaction_1: => S; birth;
  Reaction_2: S => R; alpha*(1 - beta)*(S/N)*(R + R + chi*R + eta*R);
  Reaction_3: R => R; p*gamma*R;
  Reaction_4: R => R; (1 - p)*gamma*R;
  Reaction_5: R => R; (tau + lambda)*R*(1 - c)*nuI;
  Reaction_6: R => R; (tau + lambda)*R*(1 - c)*(1 - nuI);
  Reaction_7: R => R; tau*R*(1 - c)*(1 - nuA);
  Reaction_8: R => R; tau*R*(1 - c)*nuA;
  Reaction_9: R => ; mu*R;
  Reaction_10_5: S => ; mu*S;
  Reaction_10_5: R => ; mu*R; Reaction_10_5 is "Reaction_10_1";
  Reaction_10_5: R => ; mu*R; Reaction_10_5 is "Reaction_10_2";
  Reaction_10_5: R => ; mu*R; Reaction_10_5 is "Reaction_10_3";
  Reaction_10_5: R => ; mu*R; Reaction_10_5 is "Reaction_10_4";
  Reaction_10_5: R => ; mu*R;
  Reaction_11_3: R => R; deltaI*R;
  Reaction_11_3: R => R; deltaA*R; Reaction_11_3 is "Reaction_11_1";
  Reaction_11_3: R => R; deltaIQ*R; Reaction_11_3 is "Reaction_11_2";
  Reaction_11_3: R => R; deltaAQ*R; Reaction_11_3 is "Reaction_11_2_1";
  Reaction_12: R => ; mu*R;
  Reaction_11_3: R => R; deltaQ*R;
end
